// SBML level 3 version 1

model simple_two_compartment()
  // Simple Two Compartment Model

  // Compartments:
  compartment cytoplasm = 1; cytoplasm is "Cytoplasm";
  compartment mitochondrion = 0.2; mitochondrion is "Mitochondrion";

  // Species:
  species Glucose in cytoplasm = 5;
  species G6P in cytoplasm = 2; G6P is "Glucose-6-Phosphate";
  species Pyruvate in cytoplasm = 1;
  species ATP_cyt in cytoplasm = 3; ATP_cyt is "ATP (Cytoplasm)";
  species ADP_cyt in cytoplasm = 1; ADP_cyt is "ADP (Cytoplasm)";
  species Pyruvate_mit in mitochondrion = 0.5; Pyruvate_mit is "Pyruvate (Mitochondrion)";
  species AcetylCoA in mitochondrion = 1; AcetylCoA is "Acetyl-CoA";
  species ATP_mit in mitochondrion = 5; ATP_mit is "ATP (Mitochondrion)";
  species ADP_mit in mitochondrion = 0.5; ADP_mit is "ADP (Mitochondrion)";

  // Parameters:
  k1 = 0.1;
  k2 = 0.05;
  k3 = 0.08;
  k4 = 0.15;
  k5 = 0.2;

  // Reactions:
  Hexokinase: Glucose + ATP_cyt => G6P + ADP_cyt; k1*Glucose*ATP_cyt; Hexokinase is "Glucose Phosphorylation";
  Glycolysis: G6P + 2 ADP_cyt => 2 Pyruvate + 4 ATP_cyt; k2*G6P;
  Pyruvate_Transport: Pyruvate => Pyruvate_mit; k3*Pyruvate; Pyruvate_Transport is "Pyruvate Transport to Mitochondrion";  // modifiers: ATP_mit
  PDH: Pyruvate_mit => AcetylCoA; k4*Pyruvate_mit; PDH is "Pyruvate Dehydrogenase";
  OxPhos: AcetylCoA + 12 ADP_mit => 12 ATP_mit; k5*AcetylCoA; OxPhos is "Oxidative Phosphorylation";
  ATP_Transport: ATP_mit + ADP_cyt -> ADP_mit + ATP_cyt; 0.1*(ATP_mit - ATP_cyt); ATP_Transport is "ATP Transport to Cytoplasm";
end
