// SBML level 3 version 2

model compartments_model()
  // Multi-Compartment Model

  // Compartments:
  compartment cytoplasm = 1; cytoplasm is "Cytoplasm";
  compartment mitochondria = 0.2; mitochondria is "Mitochondria";
  compartment extracellular = 10; extracellular is "Extracellular Space";

  // Species:
  species glc_ext in extracellular = 5; glc_ext is "Glucose (extracellular)";
  species glc_cyt in cytoplasm = 1; glc_cyt is "Glucose (cytoplasm)";
  species pyr_cyt in cytoplasm = 0.1; pyr_cyt is "Pyruvate (cytoplasm)";
  species pyr_mit in mitochondria = 0.05; pyr_mit is "Pyruvate (mitochondria)";

  // Parameters:
  k_transport = 0.5;
  k_glycolysis = 0.2;
  k_import = 0.3;

  // Reactions:
  glucose_transport: glc_ext => glc_cyt; k_transport*glc_ext; glucose_transport is "Glucose Transport";
  glycolysis: glc_cyt => 2 pyr_cyt; k_glycolysis*glc_cyt; glycolysis is "Glycolysis";
  pyruvate_import: pyr_cyt => pyr_mit; k_import*pyr_cyt; pyruvate_import is "Pyruvate Import";
end
